Tue Jun 25 22:21:24 EDT 2024
$PROBLEM    dummy model
$INPUT      ID TIME DV CMTX EVID MDV AMT ADDL II WT
$DATA      data_run1_sim.csv IGNORE=@
$SUBROUTINE ADVAN2 TRANS2
$PK
   AVAL=WT/70

   TVCL=THETA(1) * AVAL**0.75
   CL=TVCL*EXP(ETA(1))

   TVV=THETA(2) * AVAL
   V=TVV*EXP(ETA(2))
   S2=V

   TVKA=THETA(3)
   KA=TVKA*EXP(ETA(3))

$ERROR
  IPRED=F
  W=THETA(4)*IPRED
  IRES=DV-IPRED
  IWRES=IRES/W
  Y=IPRED + W*ERR(1)

$THETA  (0,8) ; CL
 (0,80) ; V
 (0,0.8) ; KA
 (0,0.3) ; PROP ERR
$OMEGA  BLOCK(2)
 0.5  ;     PPV_CL
 0.1 0.5  ;      PPV_V
$OMEGA  0.2  ;     PPV_KA
$SIGMA  1  FIX
$ESTIMATION MAXEVAL=9990 PRINT=3 METH=1 INTER
$COVARIANCE
$TABLE      ID TIME IPRED PRED CWRES IWRES NOPRINT ONEHEADER
            FILE=sdtab1
$TABLE      ID CL V KA ETA1 ETA2 ETA3 NOPRINT ONEHEADER FILE=patab1
$TABLE      ID WT NOPRINT ONEHEADER NOAPPEND FILE=cotab1

NM-TRAN MESSAGES
 WARNINGS AND ERRORS (IF ANY) FOR PROBLEM    1
 (WARNING  2) NM-TRAN INFERS THAT THE DATA ARE POPULATION.

1NONLINEAR MIXED EFFECTS MODEL PROGRAM (NONMEM) VERSION 7.5.0
 ORIGINALLY DEVELOPED BY STUART BEAL, LEWIS SHEINER, AND ALISON BOECKMANN
 CURRENT DEVELOPERS ARE ROBERT BAUER, ICON DEVELOPMENT SOLUTIONS,
 AND ALISON BOECKMANN. IMPLEMENTATION, EFFICIENCY, AND STANDARDIZATION
 PERFORMED BY NOUS INFOSYSTEMS.
 PROBLEM NO.:         1
 dummy model
 TOT. NO. OF OBS RECS:     1600
 TOT. NO. OF INDIVIDUALS:      200
 ONE COMPARTMENT MODEL WITH FIRST-ORDER ABSORPTION (ADVAN2)
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 #TBLN:      1
 #METH: First Order Conditional Estimation with Interaction
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
 #TERM:
0MINIMIZATION SUCCESSFUL
 NO. OF FUNCTION EVALUATIONS USED:      179
 NO. OF SIG. DIGITS IN FINAL EST.:  3.8

 ETABAR IS THE ARITHMETIC MEAN OF THE ETA-ESTIMATES,
 AND THE P-VALUE IS GIVEN FOR THE NULL HYPOTHESIS THAT THE TRUE MEAN IS 0.

 ETABAR:        -7.4737E-04 -1.2224E-02 -2.7127E-02
 SE:             3.6785E-02  3.9143E-02  4.0640E-02
 N:                     200         200         200

 P VAL.:         9.8379E-01  7.5481E-01  5.0445E-01

 ETASHRINKSD(%)  1.3288E+00  2.6655E+00  1.0255E+01
 ETASHRINKVR(%)  2.6399E+00  5.2600E+00  1.9459E+01
 EBVSHRINKSD(%)  1.2972E+00  2.5245E+00  8.3739E+00
 EBVSHRINKVR(%)  2.5775E+00  4.9852E+00  1.6047E+01
 RELATIVEINF(%)  9.7761E+01  9.3641E+01  8.3555E+01
 EPSSHRINKSD(%)  1.7022E+01
 EPSSHRINKVR(%)  3.1146E+01


 TOTAL DATA POINTS NORMALLY DISTRIBUTED (N):         1600
 N*LOG(2PI) CONSTANT TO OBJECTIVE FUNCTION:    2940.6033062549527
 OBJECTIVE FUNCTION VALUE WITHOUT CONSTANT:   -6261.9132183103611
 OBJECTIVE FUNCTION VALUE WITH CONSTANT:      -3321.3099120554084
 REPORTED OBJECTIVE FUNCTION DOES NOT CONTAIN CONSTANT

 TOTAL EFFECTIVE ETAS (NIND*NETA):                           600


 #TERE:
 Elapsed estimation  time in seconds:     6.50
 Elapsed covariance  time in seconds:     3.79
 Elapsed postprocess time in seconds:     0.09

 ********************               FIRST ORDER CONDITIONAL ESTIMATION WITH INTERACTION              ********************
 #OBJT:**************                       MINIMUM VALUE OF OBJECTIVE FUNCTION                      ********************
 #OBJV:********************************************    -6261.913       **************************************************

 ********************               FIRST ORDER CONDITIONAL ESTIMATION WITH INTERACTION              ********************
 ********************                             FINAL PARAMETER ESTIMATE                           ********************

 THETA - VECTOR OF FIXED EFFECTS PARAMETERS   *********
         TH 1      TH 2      TH 3      TH 4
         1.00E+01  1.09E+02  9.38E-01  2.02E-01

 OMEGA - COV MATRIX FOR RANDOM EFFECTS - ETAS  ********
         ETA1      ETA2      ETA3
 ETA1
+        2.79E-01
 ETA2
+        1.72E-01  3.25E-01
 ETA3
+        0.00E+00  0.00E+00  4.12E-01

 SIGMA - COV MATRIX FOR RANDOM EFFECTS - EPSILONS  ****
         EPS1
 EPS1
+        1.00E+00

 OMEGA - CORR MATRIX FOR RANDOM EFFECTS - ETAS  *******
         ETA1      ETA2      ETA3
 ETA1
+        5.29E-01
 ETA2
+        5.71E-01  5.70E-01
 ETA3
+        0.00E+00  0.00E+00  6.42E-01

 SIGMA - CORR MATRIX FOR RANDOM EFFECTS - EPSILONS  ***
         EPS1
 EPS1
+        1.00E+00

 ********************               FIRST ORDER CONDITIONAL ESTIMATION WITH INTERACTION              ********************
 ********************                            STANDARD ERROR OF ESTIMATE                          ********************

 THETA - VECTOR OF FIXED EFFECTS PARAMETERS   *********
         TH 1      TH 2      TH 3      TH 4
         3.79E-01  4.55E+00  4.56E-02  4.62E-03

 OMEGA - COV MATRIX FOR RANDOM EFFECTS - ETAS  ********
         ETA1      ETA2      ETA3
 ETA1
+        2.71E-02
 ETA2
+        2.23E-02  3.21E-02
 ETA3
+       ......... .........  5.95E-02

 SIGMA - COV MATRIX FOR RANDOM EFFECTS - EPSILONS  ****
         EPS1
 EPS1
+       .........

 OMEGA - CORR MATRIX FOR RANDOM EFFECTS - ETAS  *******
         ETA1      ETA2      ETA3
 ETA1
+        2.56E-02
 ETA2
+        4.46E-02  2.82E-02
 ETA3
+       ......... .........  4.64E-02

 SIGMA - CORR MATRIX FOR RANDOM EFFECTS - EPSILONS  ***
         EPS1
 EPS1
+       .........

 ********************               FIRST ORDER CONDITIONAL ESTIMATION WITH INTERACTION              ********************
 ********************                          COVARIANCE MATRIX OF ESTIMATE                         ********************

            TH 1      TH 2      TH 3      TH 4      OM11      OM12      OM13      OM22      OM23      OM33      SG11
 TH 1
+        1.44E-01
 TH 2
+        9.95E-01  2.07E+01
 TH 3
+        7.19E-04  5.78E-03  2.08E-03
 TH 4
+        2.34E-04  3.19E-03 -9.09E-06  2.13E-05
 OM11
+       -1.74E-03 -1.59E-02  8.58E-05 -4.30E-06  7.33E-04
 OM12
+       -1.62E-03 -8.69E-03  1.01E-04 -1.56E-05  3.59E-04  4.97E-04
 OM13
+       ......... ......... ......... ......... ......... ......... .........
 OM22
+       -8.00E-04  1.29E-02  1.45E-04 -1.59E-05  1.72E-04  4.99E-04 .........  1.03E-03
 OM23
+       ......... ......... ......... ......... ......... ......... ......... ......... .........
 OM33
+       -3.88E-03 -3.60E-02 -5.46E-04  2.32E-06  4.72E-05  4.62E-05 ......... -2.77E-05 .........  3.54E-03
 SG11
+       ......... ......... ......... ......... ......... ......... ......... ......... ......... ......... .........

 ********************               FIRST ORDER CONDITIONAL ESTIMATION WITH INTERACTION              ********************
 ********************                          CORRELATION MATRIX OF ESTIMATE                        ********************

            TH 1      TH 2      TH 3      TH 4      OM11      OM12      OM13      OM22      OM23      OM33      SG11
 TH 1
+        3.79E-01
 TH 2
+        5.76E-01  4.55E+00
 TH 3
+        4.16E-02  2.78E-02  4.56E-02
 TH 4
+        1.34E-01  1.52E-01 -4.31E-02  4.62E-03
 OM11
+       -1.70E-01 -1.29E-01  6.95E-02 -3.44E-02  2.71E-02
 OM12
+       -1.92E-01 -8.57E-02  9.90E-02 -1.51E-01  5.96E-01  2.23E-02
 OM13
+       ......... ......... ......... ......... ......... ......... .........
 OM22
+       -6.57E-02  8.83E-02  9.92E-02 -1.07E-01  1.98E-01  6.97E-01 .........  3.21E-02
 OM23
+       ......... ......... ......... ......... ......... ......... ......... ......... .........
 OM33
+       -1.72E-01 -1.33E-01 -2.01E-01  8.46E-03  2.93E-02  3.48E-02 ......... -1.45E-02 .........  5.95E-02
 SG11
+       ......... ......... ......... ......... ......... ......... ......... ......... ......... ......... .........
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 Elapsed finaloutput time in seconds:     0.16
 #CPUT: Total CPU Time in Seconds,       10.809
